m := 1
g := 1/9
h_max := 150
k := m*g/h_max
k = 0.000740741
f(x) := -m*g + k*x
f(h_max) = 0
f(1.84931993) = -0.109741
f(5) = -0.107407
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f(-500) = -0.481481
a := 10^1*1
dx := 10^-1
k_d := 10^-1
v := a, a - dx .. 0
k_v(v) := (v - v*k_d)/v
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x := a, a - dx .. 0
1 - k_d = 0.9
x = [
    10; 9.9; 9.8; 9.7; 9.6; 9.5; 9.4; 9.3; 9.2; 9.1
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]
x - x*k_d = [
    9; 8.91; 8.82; 8.73; 8.64; 8.55; 8.46; 8.37; 8.28; 8.19
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]
k_v(x) = [
    0.9; 0.9; 0.9; 0.9; 0.9; 0.9; 0.9; 0.9; 0.9; 0.9
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]
8.91/9.9 = 0.9
8.19/9.1 = 0.9
(8.91 - 8.46)/5 = 0.09
8.73 - 8.64 = 0.09
